! ===========================================================
! Energy Storage Systems (BESS)
! ===========================================================

! 分布式储能设备 - 使用 OpenDSS Storage 元件
! 储能充电: P>0 (吸收功率), 放电: P<0 (注入功率)
!
! 储能约束与光伏不同: 储能的有功 P 与无功 Q 相互独立, 不存在耦合约束
! (光伏: |q| ≤ p * tan(acos(PF)), 储能: |q| ≤ q_max 箱式约束, 与 P 无关)
!
! 储能日曲线 (绑定 LoadShape, 约定: mult[0] 即当前时段可用能量上限比例):
!   当前单断面 npts=1, mult[0]=1.0 → 能量窗口 = 额定 kWh × 1.0
!   扩展为全天曲线时改为 npts=96 interval=0.25 mult=(全天 96 点, 15min 粒度)
!   模型附加约束: 当前放电功率须能支撑 15 分钟 (p_dis × 0.25 ≤ se)

! 当前时段可用能量上限比例 (npts=1 静态断面, 单断面取 mult[0])
New LoadShape.BESS_Bus18_en npts=1 interval=1 mult=(1.0)

! BESS_Bus18: 原 PV_Bus18 (3000kW 光伏) 改造为储能, 2500kW/5000kWh (2h)
New Storage.BESS_Bus18 phases=3 bus1=bus18.1.2.3 conn=wye kV=12.66 kW=2500 kWh=5000 %Charge=100 %Discharge=100
~ chargeEff=0.95 dischargeEff=0.95
~ stateOfCharge=0.5 status=variable
~ daily=BESS_Bus18_en
